****************************************************************
*Heading
2D axisymmetric conical indentation
************************************************************************
**
** Note: Abaqus has no built-in units. It is the
** user's responsibility to use compatible units.
**
**       Units used in this problem, SI:
**                  Length               --- meters - m
**                  Time                 --- seconds - s
**                  Mass                 --- kilograms - kg
**                  Force                --- Newton - N
**                  Stress               --- Pascal - Pa = N/(m)^2
**                  Energy               --- Joule - J = N*m
**                  Density              --- kg/m^3
**
** Xiuqi Li, Aug 2019; Implemented in Abaqus 6.14-1
**
************************************************************************
*Parameter
** Indentation_depth (m)
indentation_depth = -3.75e-3
************************************************************************
** Material parameters for the high-density Poron XRD foam
************************************************************************
** Shear modulus (Pa)
G0 = 102.0e3
** Bulk modulus (Pa)
B = 193.8e3
** Locking value of J in f-fuction
Jmin = 0.19
** C_1 in L-function
C1 = 1.9
** K1_0 in X-function
K10 = -0.21
** delta_K  in X-function
delta_K = 0.2
** X1' in X-function
X1 = 3.7
** X2' in X-function
X2 = 0.22
** C0 in L-function
C0 = 0.1
** power p in L-function
p = 4
** power q in L-function
q = 5
** C_2 in f-function
C2 = 9
** C_3 in f-function
C3 = 0.026
** power r in f-function
r = 2
****************************************************************
** 			Model definition
****************************************************************
**
** Rigid indenter
**
*Node, nset=RefPt
 999999,           0., 0.00286645,           0.
*Surface, type=SEGMENTS, name=Indenter
START, 0.0057829, 0.0033232888
LINE, 0.0000499999999997592, 0.0000133974596214171
CIRCL,           0.,           0.,           0.,           0.0001
*Rigid Body, ref node=RefPt, analytical surface=Indenter
**
** Nodes
**
*Node, nset=nall
      1,           0., -0.0129000004
      2, 0.000103669066, -0.0129000004
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**
** Elements
**
*Element, type=CAX4H, elset = elall
    1,     1,     2,   142,   141
    2,     2,     3,   143,   142
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**
** Sets
**
*Nset, nset=bottom, generate
   1,  140,    1
*Nset, nset=left, generate
     1,  17361,    140
*Nset, nset=top, generate
 17361,  17500,      1
*Elset, elset=top, generate
 17098,  17236,      1
**
** Surfaces
**
*Surface, type=NODE, name=topSurf
top, 1.
************************************************************************
**                     Material definition
************************************************************************
*Solid Section, elset=elall, material=Mat
************************************************************************
******************
******************  User Elasticity
******************
************************************************************************
*material, name=Mat
*user material, constants = 14
<G0>, <B>, <Jmin>, <C1>, <K10>, <delta_K>, <X1>, <X2>,
<C0>, <p>, <q>, <C2>, <C3>, <r>
***
*depvar
3
************************************************************************
**                   Interaction Properties
************************************************************************
*Surface Interaction, name=IntProp-1
1.,
*FRICTION, ROUGH
*Surface Behavior, pressure-overclosure=HARD
************************************************************************
**                       Interactions
************************************************************************
*Contact Pair, interaction=IntProp-1, type=SURFACE TO SURFACE
topSurf, Indenter
************************************************************************
**             		Step definition
************************************************************************
*Step, name=Load, nlgeom=yes, inc=50000
*Static
2.0, 600., 6.0e-05, 10.0
**
** Boundary conditions
**
*Boundary
left, 1, 1
bottom, 1, 2
RefPt, 1, 1
RefPt, 2, 2, <indentation_depth>
RefPt, 6, 6
****************
****************  Outputs
****************
****************  Field output
****************
*Output, field, number interval=60
*node output
u,rf
*element output
s,le,sdv
****************
****************  History output
****************
*Output, history, frequency=1
*Node Output, nset=RefPt
rf2, u2
*Element Output, elset=elall
vol
*Energy output
allie
*End Step
************************************************************************
*Step, name=Unload, nlgeom=yes, inc=50000
*Static
2.0, 600., 6.0e-05, 10.0
**
** Boundary conditions
**
*Boundary
left, 1, 1
bottom, 1, 2
RefPt, 1, 1
RefPt, 2, 2, 0.0
RefPt, 6, 6
****************
****************  Outputs
****************
****************  Field output
****************
*Output, field, number interval=60
*node output
u,rf
*element output
s,le,sdv
****************
****************  History output
****************
*Output, history, frequency=1
*Node Output, nset=RefPt
rf2, u2
*Element Output, elset=elall
vol
*Energy output
allie
*End Step
************************************************************************
